*************************************************
**
** written by Amir Hosein Sakhaei
**
** sakhaei.a@gmail.com
**
** last modified: 03/August/2018
** University of Exeter
**
**     #####
**    #### _\_  ________
**    ##=-[.].]| \      \
**    #(    _\ |  |------|
**     #   __| |  ||||||||
**      \  _/  |  ||||||||
**   .--'--'-. |  | ____ |
**  / __      `|__|[o__o]|
**_(____nm_______ /____\____
*************************************************
**				START OF THE INPUT		       **
*************************************************
**
**@@@@@@@@@@@@@@@@@@@@@@@@@@@@@@@@@@@@@@@@@@@@@@@
**
** 				HEADING information			   **
**
**@@@@@@@@@@@@@@@@@@@@@@@@@@@@@@@@@@@@@@@@@@@@@@@
**
*Heading
*Preprint, echo=NO, model=NO, history=NO, contact=NO
**
**@@@@@@@@@@@@@@@@@@@@@@@@@@@@@@@@@@@@@@@@@@@@@@@
** 				PARTS information			   **
**@@@@@@@@@@@@@@@@@@@@@@@@@@@@@@@@@@@@@@@@@@@@@@@
**
**
** PARTS
**
*Part, name=Sample
*End Part
**
**
**@@@@@@@@@@@@@@@@@@@@@@@@@@@@@@@@@@@@@@@@@@@@@@@
** 				ASSEMBLY information		   **
**@@@@@@@@@@@@@@@@@@@@@@@@@@@@@@@@@@@@@@@@@@@@@@@
**
**
** ASSEMBLY
**
*Assembly, name=Assembly
**
*Instance, name=Sample-1, part=Sample
*Node
      1, 0.0151300002, 0.000199999995, 0.00499999989
      2, 0.0151300002, 0.000150000007, 0.00499999989
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***********************************************
** Element Definitions: UEL elements: #3D20_NL_COS_TUCKER (20nodes)
**********************************************
**
** ELEMENT NUMBER U1
**
*USER ELEMENT, TYPE=U1, NODES=20, COORDINATES=3, PROPERTIES=15, UNSYMM
 1,2,3,4,5,6
 2,1,2,3
 3,1,2,3,4,5,6
 4,1,2,3
 5,1,2,3,4,5,6
 6,1,2,3
 7,1,2,3,4,5,6
 8,1,2,3
 9,1,2,3
 10,1,2,3
 11,1,2,3
 12,1,2,3
 13,1,2,3,4,5,6
 14,1,2,3
 15,1,2,3,4,5,6
 16,1,2,3
 17,1,2,3,4,5,6
 18,1,2,3
 19,1,2,3,4,5,6
 20,1,2,3
**
*ELEMENT, TYPE=U1, ELSET=UEL_3D20_NL_COS
10001, 72, 2739, 2, 2736, 7, 2741, 77, 2733, 2734, 2735, 2737, 2732, 71, 2740, 1, 2738, 6, 2742, 76, 2731
10002, 73, 2749, 3, 2747, 8, 2750, 78, 2744, 2745, 2746, 2748, 2743, 72, 2739, 2, 2736, 7, 2741, 77, 2733
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**
*UEL PROPERTY, ELSET=UEL_3D20_NL_COS
1.,     0.,     0.,     0.,     1.,     0.,    1e+06,  1e+06
  2e+11,    0.5,   0.75,  5e-10,  300000., 1.,  1e+11
**
***********************************************
**
** Overlay Element Definitions : Brick elements (overlay)
**
**********************************************
**
*Element, type=C3D20, ELSET=Overlay_elements
   1,    71,    72,    77,    76,     1,     2,     7,     6,  2734,  2733,  2732,  2731,  2735,  2736,  2737,
       2738,  2740,  2739,  2741,  2742
   2,    72,    73,    78,    77,     2,     3,     8,     7,  2745,  2744,  2743,  2733,  2746,  2747,  2748,
       2736,  2739,  2749,  2750,  2741
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** Section: Section-1
*Solid Section, elset=Overlay_elements, material=Material-1
,
*End Instance
**
**
*Nset, nset=fixedX_face, instance=Sample-1
  2661,  2662,  2663,  2664,  2665,  2666
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*Nset, nset=fixedY_face, instance=Sample-1
     5,    10,    15,    20,    25,    30
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*Nset, nset=fixedZ_face, instance=Sample-1
    66,    67,    68,    69,    70,   136
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*Nset, nset=Xloading_face, instance=Sample-1
    1,    2,    3,    4,    5,    6
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*Nset, nset=Yloading_face, instance=Sample-1
     1,     6,    11,    16,    21,    26
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*Nset, nset=ALL_NODES, instance=Sample-1, generate
  1,  10109,    1
**
**
**
*Elset, elset=_Pload_surface_S6, internal, instance=Sample-1, generate
    1,  1973,     4
*Surface, type=ELEMENT, name=Pload_surface
_Pload_surface_S6, S6
*End Assembly
**@@@@@@@@@@@@@@@@@@@@@@@@@@@@@@@@@@@@@@@@@@@@@@@
** 				MATERIAL information		   **
**			     (Overlay elements)
**@@@@@@@@@@@@@@@@@@@@@@@@@@@@@@@@@@@@@@@@@@@@@@@
**
** MATERIALS
**
*Material, name=Material-1
*Elastic
 1e-08, 0.03
** ----------------------------------------------------------------
**
**@@@@@@@@@@@@@@@@@@@@@@@@@@@@@@@@@@@@@@@@@@@@@@@
** 		 		STEPS DEFINITIONS 		   	   **
**@@@@@@@@@@@@@@@@@@@@@@@@@@@@@@@@@@@@@@@@@@@@@@@
**
** STEP: Step-1
**
*Step, name=Step-1, nlgeom=YES, inc=10000
*Static
0.1, 1., 1e-08, 0.1
**
** BOUNDARY CONDITIONS
**
** Name: fixX Type: Displacement/Rotation
*Boundary
fixedX_face, 1, 1
fixedX_face, 2, 2
fixedX_face, 3, 3
fixedX_face, 4, 4
fixedX_face, 5, 5
fixedX_face, 6, 6
** Name: fixZ Type: Displacement/Rotation
**Boundary
**fixedZ_face, 3, 3
** Name: loading Type: Displacement/Rotation
*Boundary
Xloading_face, 3, 3
Xloading_face, 4, 4
Xloading_face, 5, 5
Xloading_face, 6, 6
Xloading_face, 2, 2, -0.2e-3
**
** OUTPUT REQUESTS
**
*Restart, write, frequency=0
**
** FIELD OUTPUT: F-Output-1
**
*Output, field, variable=PRESELECT
**
** HISTORY OUTPUT: fixedX_face_history
**
*Output, history
*Node Output, nset=fixedX_face
RF1, RF2, RF3, U1, U2, U3
**
** HISTORY OUTPUT: fixedY_face_history
**
**Node Output, nset=fixedY_face
**RF1, RF2, RF3, U1, U2, U3
**
** HISTORY OUTPUT: Xloading_face_history
**
*Node Output, nset=Xloading_face
RF1, RF2, RF3, U1, U2, U3
**
**
** HISTORY OUTPUT: H-Output-1
**
*Output, history, variable=PRESELECT
*End Step
